// COMSOL Multiphysics 6.3.0.290 model "sun.mph"
// Outline of the model tree

Parameters
  Tambient = 293.15  // [K]
  Tinitial = 200  // [K]
  Pdensity = 1380  // [W/m^2]
  RCircle = 0.1  // [m]
  epsilonCircle = 1
  MaxTime = 0.05  // [s]

Couplings
  aveop1: Average on domains 1

Geometry
  geom1 "Geometry 1" (2D, length unit m)
    c1: Circle | r = RCircle
    fin: Finalize "Form Union"

Materials
  mat1: Common "Material 1" on all domains
    def: def "Basic"
      thermalconductivity = 1
      density = 1
      heatcapacity = 1

Physics
  ht: HeatTransfer "Heat Transfer in Solids" on domains 1
    dependent variable T
    solid1: SolidHeatTransferModel "Solid 1" (default)
    init1: init "Initial Values 1" (default) | Tinit = Tinitial
    ins1: ThermalInsulation (default)
    sar1: SurfaceToAmbientRadiation on boundaries 1-4
      epsilon_rad_mat = userdef
      epsilon_rad = epsilonCircle
      Tamb = Tambient
    hf1: HeatFluxBoundary "Heat Flux 1" on boundaries 2, 4 | q0_input = Pdensity*ny

Mesh
  mesh1 "Mesh 1" (physics-controlled)

Studies
  std1 "Study 1"
    time: Transient "Time Dependent" | tlist = range(0,0.5,1)*MaxTime

Solver configurations
  sol1 "Solution 1" (study std1)
    v1: Variables "Dependent Variables 1"
    t1: Time "Time-Dependent Solver 1"
      fc1: FullyCoupled
      d1: Direct "Direct, heat transfer variables (ht)"

Datasets
  dset1: Solution | solution = sol1

Plots
  pg1: PlotGroup2D "Temperature (ht)" | data = dset1
    surf1: Surface | expr = T
  pg2: PlotGroup1D "1D Plot Group 2" | data = dset1
    glob1: Global | expr = aveop1(T)